*Heading
** Job name: BN-4-vumat-C3D8R-with_fracture Model name: BN-4-vumat
** Generated by: Abaqus/CAE 2021.HF4
*Preprint, echo=NO, model=NO, history=NO, contact=NO
**
** PARTS
**
*Part, name=Part-1
*Node
      1,           0.,       -4.125,         6.25
      2,           0.,       -4.125,           0.
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*Element, type=C3D8R
   1, 1236, 1237, 8422, 8178,   44,   45,  996,  995
   2, 1237, 1238, 8423, 8422,   45,   46,  997,  996
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*Nset, nset=_PickedSet93, internal, generate
     1,  25599,      1
*Elset, elset=_PickedSet93, internal, generate
     1,  22110,      1
** Section: Q460_explicit
*Solid Section, elset=_PickedSet93, material=Q460_explicit
,
*End Part
**
**
** ASSEMBLY
**
*Assembly, name=Assembly
**
*Instance, name=Part-1-1, part=Part-1
*End Instance
**
*Node
      1,           0.,         67.5,           0.
*Nset, nset=_PickedSet36, internal
 1,
*Nset, nset=_PickedSet37, internal
 1,
*Nset, nset=_PickedSet40, internal, instance=Part-1-1
   35,   36,   38,   39,  839,  840
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*Elset, elset=_PickedSet40, internal, instance=Part-1-1
 17986, 17987, 17988, 17989, 17990, 18001
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*Nset, nset=_PickedSet41, internal, instance=Part-1-1
    1,    2,    3,    4,    7,    8
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*Elset, elset=_PickedSet41, internal, instance=Part-1-1
     1,     2,     3,     4,     5,     6
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*Nset, nset=_PickedSet42, internal, instance=Part-1-1
    2,    3,    5,    6,    8,    9
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*Elset, elset=_PickedSet42, internal, instance=Part-1-1
   143,   154,   165,   176,   187,   198
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*Elset, elset=__PickedSurf35_S4, internal, instance=Part-1-1
 6603, 6606, 6609, 6612, 6615, 6618
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*Elset, elset=__PickedSurf35_S3, internal, instance=Part-1-1
 6766, 6767, 6768, 6769, 6770, 6781
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*Surface, type=ELEMENT, name=_PickedSurf35, internal
__PickedSurf35_S4, S4
__PickedSurf35_S3, S3
** Constraint: Constraint-1
*Coupling, constraint name=Constraint-1, ref node=_PickedSet36, surface=_PickedSurf35
*Kinematic
1, 1
2, 2
3, 3
4, 4
5, 5
6, 6
*End Assembly
*Amplitude, name=Amp-1, definition=SMOOTH STEP
             0.,              0.,              1.,              1.
**
** MATERIALS
**
*Material, name=Q460_explicit
*Density
 7.8e-09,
*Depvar, delete=18
     20,
*User Material, constants=73, unsymm
222800.,       0.3,     2.347,    1.3019,    1.0505,    0.3695,        0.,        0.
        2.,      0.03,  0.333333,        0.,        0.,        0.,        0.,        0.
        4.,       0.9,        1.,        1.,      100.,        0.,        0.,        0.
       24.,        0.,  0.013949, 0.0186259, 0.0232449, 0.0293963, 0.0355276, 0.0442887
 0.0537488, 0.0620044, 0.0702041, 0.0776029, 0.0856873, 0.0944335,  0.102388,  0.109929
  0.120251,  0.129766,  0.139885,  0.150253,       0.2,       0.3,      0.43,       0.6
       1.5,   438.923,   445.682,    458.74,   479.748,   501.717,   519.518,    541.91
    560.56,   575.797,   588.169,    598.69,   608.206,   618.248,   626.348,   632.689
   640.875,   648.638,    656.89,   663.756,   696.092,   746.092,   791.592,   834.092
   1014.09,
**
** BOUNDARY CONDITIONS
**
** Name: BC-1 Type: Displacement/Rotation
*Boundary
_PickedSet41, 1, 1
_PickedSet41, 6, 6
** Name: BC-2 Type: Displacement/Rotation
*Boundary
_PickedSet42, 3, 3
_PickedSet42, 4, 4
** Name: BC-3 Type: Displacement/Rotation
*Boundary
_PickedSet40, 1, 1
_PickedSet40, 2, 2
_PickedSet40, 3, 3
** ----------------------------------------------------------------
**
** STEP: Step-1
**
*Step, name=Step-1, nlgeom=YES
*Dynamic, Explicit
, 1.
*Bulk Viscosity
0.06, 1.2
** Mass Scaling: Semi-Automatic
**               Whole Model
*Variable Mass Scaling, dt=2.5e-06, type=below min, frequency=1
**
** BOUNDARY CONDITIONS
**
** Name: BC-4 Type: Displacement/Rotation
*Boundary, amplitude=Amp-1
_PickedSet37, 1, 1
_PickedSet37, 2, 2, 2.2
_PickedSet37, 3, 3
**
** OUTPUT REQUESTS
**
*Restart, write, number interval=1, time marks=NO
**
** FIELD OUTPUT: F-Output-1
**
*Output, field, time interval=0.01
*Node Output
RF, U, V
*Element Output, directions=YES
LE, PE, PEEQ, S, SDV, STATUS
*Contact Output
CSTRESS,
**
** HISTORY OUTPUT: H-Output-1
**
*Output, history, variable=PRESELECT, time interval=0.01
*End Step
